** Generated by validation/run_c3d8_contact_trajectory_validation.py
*HEADING
C3D8 dynamic contact trajectory validation: block_block_c3d8
*NODE, NSET=NALL
1, -2.500000000000e-01, -2.500000000000e-01, 0.000000000000e+00
2, 2.500000000000e-01, -2.500000000000e-01, 0.000000000000e+00
3, -2.500000000000e-01, 2.500000000000e-01, 0.000000000000e+00
4, 2.500000000000e-01, 2.500000000000e-01, 0.000000000000e+00
5, -2.500000000000e-01, -2.500000000000e-01, 2.400000000000e-01
6, 2.500000000000e-01, -2.500000000000e-01, 2.400000000000e-01
7, -2.500000000000e-01, 2.500000000000e-01, 2.400000000000e-01
8, 2.500000000000e-01, 2.500000000000e-01, 2.400000000000e-01
9, -2.500000000000e-01, -2.500000000000e-01, 2.550000000000e-01
10, 2.500000000000e-01, -2.500000000000e-01, 2.550000000000e-01
11, -2.500000000000e-01, 2.500000000000e-01, 2.550000000000e-01
12, 2.500000000000e-01, 2.500000000000e-01, 2.550000000000e-01
13, -2.500000000000e-01, -2.500000000000e-01, 5.150000000000e-01
14, 2.500000000000e-01, -2.500000000000e-01, 5.150000000000e-01
15, -2.500000000000e-01, 2.500000000000e-01, 5.150000000000e-01
16, 2.500000000000e-01, 2.500000000000e-01, 5.150000000000e-01
*ELEMENT, TYPE=C3D8, ELSET=ELALL
1, 1, 2, 4, 3, 5, 6, 8, 7
2, 9, 10, 12, 11, 13, 14, 16, 15
*NSET, NSET=NSLAVE
9, 10, 11, 12, 13, 14, 15, 16
*NSET, NSET=NFIXED
1, 2, 3, 4, 5, 6, 7, 8
*MATERIAL, NAME=MAT
*ELASTIC
1.000000000000e+05, 3.000000000000e-01
*DENSITY
1.000000000000e+00
*SOLID SECTION, ELSET=ELALL, MATERIAL=MAT
*SURFACE, NAME=SSLAVE, TYPE=ELEMENT
2, S1
*SURFACE, NAME=SMASTER, TYPE=ELEMENT
1, S2
*SURFACE INTERACTION, NAME=CONTACT
*SURFACE BEHAVIOR, PRESSURE-OVERCLOSURE=LINEAR
5.000000000000e+04
*CONTACT PAIR, INTERACTION=CONTACT, TYPE=SURFACE TO SURFACE
SSLAVE, SMASTER
*INITIAL CONDITIONS, TYPE=VELOCITY
NSLAVE, 3, -3.000000000000e-01
*BOUNDARY
NFIXED, 1, 3, 0.0
*STEP, NLGEOM
*DYNAMIC
2.000000000000e-03, 8.000000000000e-02, 2.000000000000e-05, 2.000000000000e-03
*DLOAD
ELALL, GRAV, 9.810000000000e+00, 0.0, 0.0, -1.0
*NODE PRINT, NSET=NALL, FREQUENCY=1
U
*NODE PRINT, NSET=NALL, FREQUENCY=1
V
*NODE PRINT, NSET=NFIXED, TOTALS=ONLY, GLOBAL=YES, FREQUENCY=1
RF
*CONTACT PRINT, FREQUENCY=1
CDIS,CSTR,CELS
*CONTACT PRINT, TOTALS=ONLY, FREQUENCY=1
CELS,CNUM
*EL PRINT, ELSET=ELALL, FREQUENCY=1
S,E
*END STEP
