*Heading
Commercial reference: deformable sphere impact on deformable cantilever
*Preprint, echo=NO, model=NO, history=NO, contact=NO
*Material, name=BEAM_MAT
*Density
1.200000000000e+03
*Elastic
2.500000000000e+08, 3.000000000000e-01
*Material, name=SPHERE_MAT
*Density
3.500000000000e+03
*Elastic
5.000000000000e+06, 3.000000000000e-01
*Surface Interaction, name=FRICTIONLESS_CONTACT
*Surface Behavior, pressure-overclosure=LINEAR
5.000000000000e+09
*Friction
0.
*Part, name=BEAM
*Node
1, 0.000000000000e+00, -4.000000000000e-02, -2.000000000000e-02
2, 1.000000000000e-02, -4.000000000000e-02, -2.000000000000e-02
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*Element, type=C3D8R, elset=BEAM_EALL
1, 1, 2, 63, 62, 550, 551, 612, 611
2, 2, 3, 64, 63, 551, 552, 613, 612
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*Elset, elset=BEAM_EALL, generate
1, 1920, 1
*Solid Section, elset=BEAM_EALL, material=BEAM_MAT
,
*End Part
*Part, name=SPHERE
*Node
1, 4.000000000000e-01, 0.000000000000e+00, 6.900000000000e-02
2, 4.000000000000e-01, 0.000000000000e+00, 1.140000000000e-01
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*Element, type=C3D4, elset=SPHERE_EALL
1, 1, 2, 3, 4
2, 1, 2, 4, 5
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*Elset, elset=SPHERE_EALL, generate
1, 2208, 1
*Solid Section, elset=SPHERE_EALL, material=SPHERE_MAT
,
*End Part
*Assembly, name=ASSEMBLY
*Instance, name=BEAM-1, part=BEAM
*End Instance
*Instance, name=SPHERE-1, part=SPHERE
*End Instance
*Nset, nset=BEAM_FIXED, instance=BEAM-1
1, 62, 123, 184, 245, 306
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*Nset, nset=SPHERE_NODES, instance=SPHERE-1
1, 2, 3, 4, 5, 6
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*End Assembly
*Initial Conditions, type=VELOCITY
SPHERE_NODES, 3, -1.200000000000e+00
*Boundary
BEAM_FIXED, ENCASTRE
*Step, name=DROP_IMPACT, nlgeom=YES
*Dynamic, Explicit, DIRECT USER CONTROL
1.000000000000e-05, 2.000000000000e-02
*Bulk Viscosity
0., 0.
*Dload
BEAM-1.BEAM_EALL, GRAV, 9.810000000000e+00, 0., 0., -1.
SPHERE-1.SPHERE_EALL, GRAV, 9.810000000000e+00, 0., 0., -1.
*Contact
*Contact Inclusions, ALL EXTERIOR
*Contact Property Assignment
, , FRICTIONLESS_CONTACT
*Output, field, time interval=1.000000000000e-03
*Node Output
U, V
*Element Output, directions=YES
S, LE
*Output, history, time interval=1.000000000000e-03
*Energy Output
ALLKE, ALLIE, ALLSE, ALLVD, ALLWK, ETOTAL
*End Step
