*Heading
Abaqus Explicit fixed-dt linear-penalty sphere free fall onto rigid plane
*Preprint, echo=NO, model=NO, history=NO, contact=NO
*Material, name=BODY_MAT
*Density
1.200000000000e+03
*Elastic
5.000000000000e+07, 3.000000000000e-01
*Surface Interaction, name=FRICTIONLESS_LINEAR_PENALTY
*Surface Behavior, pressure-overclosure=LINEAR
5.000000000000e+09
*Contact Damping, definition=CRITICAL DAMPING FRACTION
0.000000000000e+00
*Friction
0.
*Part, name=FLEX_SPHERE
*Node
1, 0.000000000000e+00, 0.000000000000e+00, 7.000000000000e-02
2, 0.000000000000e+00, 0.000000000000e+00, 1.200000000000e-01
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*Element, type=C3D4, elset=SPHERE_EALL
1, 1, 2, 3, 4
2, 1, 2, 4, 5
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*Elset, elset=SPHERE_EALL, generate
1, 528, 1
*Solid Section, elset=SPHERE_EALL, material=BODY_MAT
,
*End Part
*Part, name=RIGID_PLANE
*Node
1, -3.000000000000e-01, -3.000000000000e-01, 0.000000000000e+00
2, 3.000000000000e-01, -3.000000000000e-01, 0.000000000000e+00
3, 3.000000000000e-01, 3.000000000000e-01, 0.000000000000e+00
4, -3.000000000000e-01, 3.000000000000e-01, 0.000000000000e+00
5, 0.000000000000e+00, 0.000000000000e+00, 0.000000000000e+00
*Element, type=R3D4, elset=PLANE_EALL
1, 1, 2, 3, 4
*Nset, nset=PLANE_RP
5
*Rigid Body, ref node=PLANE_RP, elset=PLANE_EALL
*End Part
*Assembly, name=ASSEMBLY
*Instance, name=SPHERE-1, part=FLEX_SPHERE
*End Instance
*Instance, name=PLANE-1, part=RIGID_PLANE
*End Instance
*Nset, nset=BODY_NODES, instance=SPHERE-1
1, 2, 3, 4, 5, 6
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*End Assembly
*Boundary
PLANE-1.PLANE_RP, ENCASTRE
*Step, name=EXPLICIT_LINEAR_FIXED_DT, nlgeom=YES
*Dynamic, Explicit, DIRECT USER CONTROL
5.000000000000e-06, 1.000000000000e+00
*Bulk Viscosity
0., 0.
*Dload
SPHERE-1.SPHERE_EALL, GRAV, 9.810000000000e+00, 0., 0., -1.
*Contact
*Contact Inclusions, ALL EXTERIOR
*Contact Property Assignment
, , FRICTIONLESS_LINEAR_PENALTY
*Output, field, time interval=1.000000000000e-03
*Node Output
U, V
*Element Output, elset=SPHERE-1.SPHERE_EALL, directions=YES
S, LE
*Output, history, time interval=1.000000000000e-03
*Energy Output
ALLKE, ALLIE, ALLSE, ALLVD, ALLWK, ETOTAL
*End Step
