** Generated by validation/run_c3d8_contact_trajectory_validation.py
*HEADING
C3D8 dynamic contact trajectory validation: curved_nonplanar_c3d8
*NODE, NSET=NALL
1, -2.500000000000e-01, -2.500000000000e-01, 0.000000000000e+00
2, 0.000000000000e+00, -2.500000000000e-01, 0.000000000000e+00
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*ELEMENT, TYPE=C3D8, ELSET=ELALL
1, 1, 2, 5, 4, 10, 11, 14, 13
2, 2, 3, 6, 5, 11, 12, 15, 14
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*NSET, NSET=NSLAVE
28, 29, 30, 31, 32, 33
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*NSET, NSET=NFIXED
1, 2, 3, 4, 5, 6
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*MATERIAL, NAME=MAT
*ELASTIC
1.000000000000e+05, 3.000000000000e-01
*DENSITY
1.000000000000e+00
*SOLID SECTION, ELSET=ELALL, MATERIAL=MAT
*SURFACE, NAME=SSLAVE, TYPE=ELEMENT
9, S1
10, S1
11, S1
12, S1
*SURFACE, NAME=SMASTER, TYPE=ELEMENT
5, S2
6, S2
7, S2
8, S2
*SURFACE INTERACTION, NAME=CONTACT
*SURFACE BEHAVIOR, PRESSURE-OVERCLOSURE=LINEAR
5.000000000000e+04
*CONTACT PAIR, INTERACTION=CONTACT, TYPE=SURFACE TO SURFACE
SSLAVE, SMASTER
*INITIAL CONDITIONS, TYPE=VELOCITY
NSLAVE, 3, -3.000000000000e-01
*BOUNDARY
NFIXED, 1, 3, 0.0
*STEP, NLGEOM
*DYNAMIC
2.000000000000e-03, 4.000000000000e-02, 2.000000000000e-05, 2.000000000000e-03
*DLOAD
ELALL, GRAV, 9.810000000000e+00, 0.0, 0.0, -1.0
*NODE PRINT, NSET=NALL, FREQUENCY=1
U
*NODE PRINT, NSET=NALL, FREQUENCY=1
V
*NODE PRINT, NSET=NFIXED, TOTALS=ONLY, GLOBAL=YES, FREQUENCY=1
RF
*CONTACT PRINT, FREQUENCY=1
CDIS,CSTR,CELS
*CONTACT PRINT, TOTALS=ONLY, FREQUENCY=1
CELS,CNUM
*EL PRINT, ELSET=ELALL, FREQUENCY=1
S,E
*END STEP
